// COMSOL Multiphysics 6.2.0.290 model "2d_hemholtz.mph"
// Outline of the model tree

Geometry
  geom1 "几何 1" (2D, length unit m)
    c1: Circle "圆 1"
    pt1: Point "点 1"
    uni1: Union "并集 1" | input = c1, pt1
    fin: Finalize "形成联合体"

Physics
  hzeq: HelmholtzEquation "亥姆霍兹方程" on all domains
    dependent variable u
    EquationForm.form = Automatic
    heq1: HelmholtzEquation "亥姆霍兹方程 1" (default) | c = {-1, 0, 0, -1}; a = 100; f = 0
    zflx1: ZeroFluxBoundary "零通量 1" (default)
    init1: init "初始值 1" (default)
    ptsrc1: PointSourceTerm "点源 1" on points 3 | f = 1
    dir1: DirichletBoundary "狄利克雷边界条件 1" on boundaries 1-4 | r = 0

Mesh
  mesh1 "网格 1" (physics-controlled)
    size: MeshSizeDefault "大小" | hauto = 2

Studies
  std1 "研究 1"
    stat: Stationary "稳态"

Solver configurations
  sol1 "解 1" (study std1)
    v1: Variables "因变量 1"
    s1: Stationary "稳态求解器 1"
      dDef: Direct "直接"
      fc1: FullyCoupled "全耦合 1" | linsolver = dDef

Datasets
  dset1: Solution | solution = sol1

Plots
  pg1: PlotGroup2D "亥姆霍兹方程" | data = dset1
    surf1: Surface "表面 1" | expr = u